# Vorgegebene Auslegungsdaten:
# Bezeichnung und Wert:  Benennung:
T_an := 50 N*m
# Antriebsdrehmoment
#
# Abtriebsdrehmoment
#
# Schaltdrehzahl
T_ab := 650 N*m
n_S := 1100 min^-1
n_an := 2000 min^-1
# Antriebsdrehzahl
#
# Bohr-Abtriebskraft
#
# Belastungsfaktor
F_B := 1.5 kN
K_A := 2.0
# 1) Auslegen der Übersetzung
